** ======================================================================
** LevelSetWear, input file of an example
**
** Written by Inigo Llavori
**
** I. Llavori, Wear simulation on a fixed mesh with level sets
** and immersed frictional contact,
** submitted for publication. Mondragon Unibertsitatea.
** https://github.com/illavori/LevelSetWear       BSD 3-Clause
** ======================================================================
*HEADING
Plate with a hole (Kirsch), fixed 64 x 64 grid, cut elements
*NODE, NSET=NALL
1, 0, 0
2, 0.0625, 0
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*USER ELEMENT, NODES=4, TYPE=U1, PROPERTIES=6, COORDINATES=2, VARIABLES=21
1, 2
*ELEMENT, TYPE=U1, ELSET=EALL
1, 1, 2, 67, 66
2, 2, 3, 68, 67
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*NSET, NSET=XSYM
1, 66, 131, 196, 261, 326
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*NSET, NSET=YSYM
1, 2, 3, 4, 5, 6
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*UEL PROPERTY, ELSET=EALL
200000, 0.3, 1., 1., 1e-06, 4
*ELEMENT, TYPE=CPE4, ELSET=GHOST
100001, 1, 2, 67, 66
100002, 2, 3, 68, 67
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*SOLID SECTION, ELSET=GHOST, MATERIAL=GHOST
1.
*MATERIAL, NAME=GHOST
*USER MATERIAL, CONSTANTS=1
100000
*DEPVAR
5
1, S11
2, S22
3, S33
4, S12
5, VFRAC
*STEP
*STATIC
*BOUNDARY
XSYM, 1, 1
YSYM, 2, 2
*CLOAD
65, 1, 2.65512911198377
65, 2, -0.00470359218479517
130, 1, 5.31145491804274
130, 2, -0.0281927543807912
195, 1, 5.31503686299045
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4225, 2, -0.143339147125034
*ENERGY PRINT
*OUTPUT, FIELD
*NODE OUTPUT
U
*ELEMENT OUTPUT, ELSET=GHOST
SDV
*END STEP
