** ======================================================================
** LevelSetWear, input file of an example
**
** Written by Inigo Llavori
**
** I. Llavori, Wear simulation on a fixed mesh with level sets
** and immersed frictional contact,
** submitted for publication. Mondragon Unibertsitatea.
** https://github.com/illavori/LevelSetWear       BSD 3-Clause
** ======================================================================
*HEADING
Mindlin contact, cylinder on flat, standard Abaqus contact (reference)
*PREPRINT, ECHO=NO, MODEL=NO, HISTORY=NO, CONTACT=NO
*NODE, NSET=NALL
1, -3.5, 6
2, -1, 0.591673076
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*NSET, NSET=QPOINT
50001
*NSET, NSET=DISP
50002
*ELEMENT, TYPE=CPE4, ELSET=BULK
1, 1, 9, 884, 448
2, 9, 10, 885, 884
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*ELSET, ELSET=_CYLTOP4
1, 21, 41, 61, 81, 101
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*SURFACE, TYPE=ELEMENT, NAME=CYLTOP4
_CYLTOP4, S4
*ELSET, ELSET=_CYLTOP3
5991, 5992, 5993, 5994, 5995, 5996
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*SURFACE, TYPE=ELEMENT, NAME=CYLTOP3
_CYLTOP3, S3
*ELSET, ELSET=_FLATBOT
20001, 20021, 20041, 20061, 20081, 20101
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*SURFACE, TYPE=ELEMENT, NAME=FLATBOT
_FLATBOT, S4
*SURFACE, NAME=CYLTOP, COMBINE=UNION
CYLTOP4
CYLTOP3
*COUPLING, CONSTRAINT NAME=CC, REF NODE=QPOINT, SURFACE=CYLTOP
*KINEMATIC
*COUPLING, CONSTRAINT NAME=CF, REF NODE=DISP, SURFACE=FLATBOT
*KINEMATIC
*SOLID SECTION, ELSET=BULK, MATERIAL=STEEL
1.
*MATERIAL, NAME=STEEL
*ELASTIC
200000, 0.3
*ELSET, ELSET=_SLAVE
26050, 26100, 26150, 26200, 26250, 26300
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*SURFACE, TYPE=ELEMENT, NAME=SLAVE
_SLAVE, S2
*ELSET, ELSET=_MASTER
6090, 6140, 6190, 6240, 6290, 6340
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*SURFACE, TYPE=ELEMENT, NAME=MASTER
_MASTER, S2
*SURFACE INTERACTION, NAME=CP
1.
*FRICTION, ELASTIC SLIP=2.50923e-06
0.6,
*SURFACE BEHAVIOR, PENALTY=LINEAR
2e+08
*CONTACT PAIR, INTERACTION=CP, SMALL SLIDING, TYPE=SURFACE TO SURFACE
SLAVE, MASTER
*STEP, NAME=APPROACH, INC=100
*STATIC
1., 1., 1e-5, 1.
*BOUNDARY
QPOINT, 1, 1
QPOINT, 2, 2, -0.0002
QPOINT, 6, 6
DISP, 1, 1
DISP, 2, 2
DISP, 6, 6
*OUTPUT, FIELD
*NODE OUTPUT
U, RF
*ELEMENT OUTPUT
S
*CONTACT OUTPUT
CSTRESS, CDISP, CSTATUS
*NODE PRINT, NSET=QPOINT, SUMMARY=NO, TOTALS=NO
U1, U2, RF1, RF2
*END STEP
*STEP, NAME=NORMAL, INC=200
*STATIC
0.1, 1., 1e-6, 0.25
*BOUNDARY, OP=NEW
QPOINT, 1, 1
QPOINT, 6, 6
DISP, 1, 1
DISP, 2, 2
DISP, 6, 6
*CLOAD
QPOINT, 2, -120
*OUTPUT, FIELD
*NODE OUTPUT
U, RF
*ELEMENT OUTPUT
S
*CONTACT OUTPUT
CSTRESS, CDISP, CSTATUS
*NODE PRINT, NSET=QPOINT, SUMMARY=NO, TOTALS=NO
U1, U2, RF1, RF2
*END STEP
*STEP, NAME=TANGENTIAL, INC=200
*STATIC
0.1, 1., 1e-6, 0.1
*BOUNDARY, OP=NEW
QPOINT, 6, 6
DISP, 1, 1
DISP, 2, 2
DISP, 6, 6
*CLOAD
QPOINT, 1, 36
*OUTPUT, FIELD
*NODE OUTPUT
U, RF
*ELEMENT OUTPUT
S
*CONTACT OUTPUT
CSTRESS, CDISP, CSTATUS
*NODE PRINT, NSET=QPOINT, SUMMARY=NO, TOTALS=NO
U1, U2, RF1, RF2
*END STEP
*STEP, NAME=UNLOAD, INC=200
*STATIC
0.1, 1., 1e-6, 0.1
*CLOAD
QPOINT, 1, 0
*OUTPUT, FIELD
*NODE OUTPUT
U, RF
*ELEMENT OUTPUT
S
*CONTACT OUTPUT
CSTRESS, CDISP, CSTATUS
*NODE PRINT, NSET=QPOINT, SUMMARY=NO, TOTALS=NO
U1, U2, RF1, RF2
*END STEP
*STEP, NAME=REVERSE, INC=200
*STATIC
0.1, 1., 1e-6, 0.1
*CLOAD
QPOINT, 1, -36
*OUTPUT, FIELD
*NODE OUTPUT
U, RF
*ELEMENT OUTPUT
S
*CONTACT OUTPUT
CSTRESS, CDISP, CSTATUS
*NODE PRINT, NSET=QPOINT, SUMMARY=NO, TOTALS=NO
U1, U2, RF1, RF2
*END STEP
